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f(x) := x^2 + (x - 2)*sin(x) - 5
x := -5 .. 5
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x := -1
x1 := root(f(x), x)
x1 = -1.32936
x := 2
x2 := root(f(x), x)
x2 = 2.19967
f(x1) = 9.76996e-15
f(x2) = 3.52607e-13
y1 := x1^2 + (x1 - 2)*sin(x1) - 5 = 9.76996e-15
y2 := x2^2 + (x2 - 2)*sin(x2) - 5 = 3.52607e-13
