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f(x) := x^2 + x*sin(2*x) - (x - 5)*cos(x)
x := -4 .. 4
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x1 := root(f(x), x, -3, -2)
x1 = -2.97354
x2 := root(f(x), x, -2, -1)
x2 = -1.93283
f(x1) = -1.77636e-15
f(x2) = 0
y1 := x1^2 + x1*sin(2*x1) - (x1 - 5)*cos(x1) = -1.77636e-15
y2 := x2^2 + x2*sin(2*x2) - (x2 - 5)*cos(x2) = 0
