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n := floor(rnd(10) + 1) = 1
a := -3*n
b := 3*n
A := runif(3, a, b)
B := runif(3, a, b)
C := runif(3, a, b)
A = [-1.84006; 0.510037; -0.898151]
B = [1.93703; -1.95523; 1.26297]
C = [-1.17608; -2.45153; -2.11612]
s := A[0]*B[0] + A[1]*B[1] + A[2]*B[2] = -5.69583
s := vectorize(A)*vectorize(B) = -5.69583
V := vectorize(B)×vectorize(C) = [7.23371; 2.61362; -7.04819]
V := [B[1]*C[2] - B[2]*C[1]; B[2]*C[0] - B[0]*C[2]; B[0]*C[1] - B[1]*C[0]] = [7.23371; 2.61362; -7.04819]
w := (A[1]*B[2] - A[2]*B[1])*C[0] + (A[2]*B[0] - A[0]*B[2])*C[1] + (A[0]*B[1] - A[1]*B[0])*C[2] = -5.64709
w := (vectorize(A)×vectorize(B))*vectorize(C) = -5.64709
p := if((|A| > |B|) and (|A| > |C|), "Это А", "Это не А")
p := if((|B| > |A|) and (|B| > |C|), "'Это B", p)
p := if((|C| > |B|) and (|C| > |A|), "'Это С", p)
p = "'Это С"
n := 10
m := 10
i := 0 .. n - 1
j := 0 .. m - 1
M[i, j] := floor(-10 + rnd(20))
M = [
    9, -8, -10, 0, 2, -7, -1, -9, 5, 0;
    7, 9, 0, -1, 7, 5, 9, 2, -5, 6;
    -3, 3, -10, -5, 1, 6, -1, 4, -1, 4;
    1, 4, 1, -7, -2, 0, 5, -7, -1, 3;
    -8, -8, 3, -2, 9, -7, 6, -7, 6, -7;
    4, -5, 3, 4, -8, 6, 0, -2, 8, 0;
    -1, 6, -1, 9, 4, -7, 6, 0, -10, 1;
    0, 6, 3, 6, -8, -4, -5, -8, 6, 2;
    -5, -10, 6, -6, 1, -8, 5, 0, -2, 3;
    -2, 1, 2, 0, 3, -7, -7, -1, -9, -9
]
Mv[i] := sum(M[:, i])
sum(sum(M[i, j], j = 0 .. 9), i = 0 .. 9) = -30
sM := sum(Mv)
sumPos(A) :=
    s ← 0
    for i ∈ 0 .. 9
        for j ∈ 0 .. 9
            s ← s + A[i, j] if (A[i, j] > 0)
    return s
sM = -30
Mp[i, j] := M[i, j]*(M[i, j] > 0)
Mpv[i] := sum(Mp[:, i])
sumPos(M) = 212
sMp := sum(Mpv)
sumNeg(A) :=
    s ← 0
    for i ∈ 0 .. 9
        for j ∈ 0 .. 9
            s ← s + A[i, j] if (A[i, j] < 0)
    return s
sMp = 212
Mn[i, j] := M[i, j]*(M[i, j] < 0)
Mnv[i] := sum(Mn[:, i])
sMn := sum(Mnv)
sumNeg(M) = -242
sMn = -242
Y := submatrix(M, 9, 9, 0, 9) = [-2, 1, 2, 0, 3, -7, -7, -1, -9, -9]
X := submatrix(M, 0, 9, 0, 0) = [9; 7; -3; 1; -8; 4; -1; 0; -5; -2]
q := vectorize(X)*vectorize(transpose(Y))
q = 1
