# 9 задание
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f(x, y) := sin(sqrt(x^2 + y^2))/sqrt(x^2 + y^2)
x1 := -15
x2 := 15
Δx := 0.71428
Nx := (x2 - x1)/Δx
Nx = 42.0003
y1 := -15
y2 := 15
Δy := 0.71428
Ny := (y2 - y1)/Δy
Ny = 42.0003
i := 0 .. Nx
x[i] := x1 + i*Δx
j := 0 .. Ny
y[j] := y1 + j*Δy
M[i, j] := f(x[i], y[j])
# [component: inputs M]
