# Задание 1
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# ----------------------------------------------------------------------------------------------------------------------------------------------------------
# Координаты вершин: | Координаты окна Windows:
X_A := -2
Y_A := -4
X_LW := 100
Y_LW := 200
X_B := -3
Y_B := 0
X_HW := 400
Y_HW := 500
X_C := 0
Y_C := 4
X_D := 3
Y_D := 0
X_E := 2
Y_E := -4
X_F := -2
Y_F := 0
X_H := 2
Y_H := 0
# ----------------------------------------------------------------------------------------------------------------------------------------------------------
Z_X := transpose([X_A, X_B, X_C, X_D, X_E, X_F, X_H])
Z_Y := transpose([Y_A, Y_B, Y_C, Y_D, Y_E, Y_F, Y_H])
X_L := min(Z_X)
Y_HI := max(Z_Y)
Y_HI = 4  # - левый верхний угол в МСК
X_L = -3
Y_L := min(Z_Y)
X_HI := max(Z_X)
Y_L = -4  # - правый нижний угол в МСК
X_HI = 3
# ----------------------------------------------------------------------------------------------------------------------------------------------------------
# Вычисляем параметры, необходимые для формирования матрицы пересчёта координат из МСК в ОСК
ΔX_W := X_HW - X_LW
ΔX_W = 300  # - ширина области отображения в ОСК
ΔX := X_HI - X_L
ΔX = 6  # - ширина области отображения в МСК
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ΔY_W := Y_HW - Y_LW
ΔY_W = 300  # - высота области отображения в ОСК
ΔY := Y_HI - Y_L
ΔY = 8  # - высота области отображения в МСК
K_X := ΔX_W/ΔX
K_X = 50
K_Y := ΔY_W/ΔY
K_Y = 37.5
T_SW := [K_X, 0, X_LW - K_X*X_L; 0, -K_Y, Y_HW + K_Y*Y_L; 0, 0, 1]  # - матрица пересчёта из МСК в ОСК
# ----------------------------------------------------------------------------------------------------------------------------------------------------------
# Вычисляем координаты вершин в ОСК
[X_AW; Y_AW; q] := T_SW*[X_A; Y_A; 1]
[X_AW; Y_AW; q] = [150; 500; 1]  # - вершина A
[X_BW; Y_BW; q] := T_SW*[X_B; Y_B; 1]
[X_BW; Y_BW; q] = [100; 350; 1]  # - вершина B
[X_CW; Y_CW; q] := T_SW*[X_C; Y_C; 1]
[X_CW; Y_CW; q] = [250; 200; 1]  # - вершина C
[X_DW; Y_DW; q] := T_SW*[X_D; Y_D; 1]
[X_DW; Y_DW; q] = [400; 350; 1]  # - вершина D
[X_EW; Y_EW; q] := T_SW*[X_E; Y_E; 1]
[X_EW; Y_EW; q] = [350; 500; 1]  # - вершина E
[X_FW; Y_FW; q] := T_SW*[X_F; Y_F; 1]
[X_FW; Y_FW; q] = [150; 350; 1]  # - вершина F
[X_HWC; Y_HWC; q] := T_SW*[X_H; Y_H; 1]
[X_HWC; Y_HWC; q] = [350; 350; 1]  # - вершина H
# ----------------------------------------------------------------------------------------------------------------------------------------------------------
# Построение графиков
X_1 := [X_B; X_C; X_D; X_B]
Y_1 := [Y_B; Y_C; Y_D; Y_B]
X_W1 := [X_BW; X_CW; X_DW; X_BW]
Y_W1 := [Y_BW; Y_CW; Y_DW; Y_BW]
X_2 := [X_A; X_F; X_H; X_E; X_A]
Y_2 := [Y_A; Y_F; Y_H; Y_E; Y_A]
X_W2 := [X_AW; X_FW; X_HWC; X_EW; X_AW]
Y_W2 := [Y_AW; Y_FW; Y_HWC; Y_EW; Y_AW]
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# ----------------------------------------------------------------------------------------------------------------------------------------------------------
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# Задание 2
# ----------------------------------------------------------------------------------------------------------------------------------------------------------
f(x) := sin(π*x)*sqrt(|x|)  # - заданная функция
x_1 := -6
x_2 := 6
Δx := 0.1
# Область отображения графика в окне Windows
x_LW := 100
y_LW := 200  # - левый верхний угол
x_HW := 800
y_HW := 900  # - правый нижний угол
# ----------------------------------------------------------------------------------------------------------------------------------------------------------
# Вычисляем число точек графика
N := round((x_2 - x_1)/Δx)
N = 120  # - число точек графика
# Заполняем массивы X, Y, Z значениями x_i y_i = f(x_i) и 1 соответственно в МСК
i := 0 .. N
X[i] := x_1 + i*Δx
Y[i] := f(X[i])
Z[i] := 1  # - x, y - координаты точек графика в МСК
# Определяем область графика в МСК
x_L := min(X)
y_H := max(Y)  # - левый верхний угол в МСК
x_L = -6
y_H = 2.34521
x_H := max(X)
y_L := min(Y)  # - правый нижний угол в МСК
x_H = 6
y_L = -2.34521
# Формируем матрицу координат точек графика в МСК
M_S := stack(transpose(X), transpose(Y), transpose(Z))
# Вычисляем параметры, необходимые для формирования матрицы пересчёта координат из МСК в ОСК
Δx_W := x_HW - x_LW
Δx := x_H - x_L
Δx = 12
# - ширина области
# отображения в МСК
Δx_W = 700
# - ширина области
# отображения в ОСК
Δy := y_H - y_L
Δy_W := y_HW - y_LW
Δy = 4.69042
# - высота области
# отображения в ОСК
Δy_W = 700
# - высота области
# отображения в ОСК
k_y := Δy_W/Δy
k_x := Δx_W/Δx
k_y = 149.241
k_x = 58.3333
# Формируем матрицу пересчёта из МСК в ОСК
T_SW := [k_x, 0, x_LW - k_x*x_L; 0, -k_y, y_HW + k_y*y_L; 0, 0, 1]
# Вычисляем матрицу координат точек графика в ОСК
M_W := T_SW*M_S  # - координаты точек графика в ОСК
# Из матрицы M_W выбираем (x, y) - координаты точек графика для отображения
X_W := transpose(M_W)[:, 0]
Y_W := transpose(M_W)[:, 1]
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